<?xml version="1.0"?>

<!--
  File:     Continental C90.xml
  Author:   AeromatiC++ v 3.3.8/Wayne Bragg

  See: http://wiki.flightgear.org/JSBSim_Engines#FGPiston

  Inputs:
    name:           Continental C90-8F
    type:           Piston Engine
    power:          95 hp
-->

<piston_engine name="Continental C90">
  <minmp unit="INHG">          10.0     </minmp>
  <maxmp unit="INHG">          28.5     </maxmp>
  <displacement unit="IN3">   201       </displacement>
  <maxhp>                      95       </maxhp>
  <cycles>                      4.0     </cycles>
  <idlerpm>                   550.0     </idlerpm>
  <maxrpm>                   2625.0     </maxrpm>
  <sparkfaildrop>               0.1     </sparkfaildrop>
  <volumetric-efficiency>       0.85    </volumetric-efficiency>
  <man-press-lag>               0.1     </man-press-lag>
  <static-friction unit="HP">   0.475   </static-friction>
  <starter-torque>             76       </starter-torque>
  <starter-rpm>              1400       </starter-rpm>
  <!-- Defining <bsfc> over-rides the built-in horsepower calculations -->
  <!--<bsfc>                    0.45    </bsfc>-->
  <stroke unit="IN">            3.88   </stroke>
  <bore unit="IN">              4.06  </bore>
  <cylinders>                   4       </cylinders>
  <compression-ratio>           7.0     </compression-ratio>
</piston_engine>
